// COMSOL Multiphysics 6.3.0.420 model "Micro_Indentation_Au_1.mph"
// Outline of the model tree

Parameters
  disp_ctrl = 1  // Control mode (1 = displacement, 0 = force)
  h_max = 2[um]  // Maximum depth
  F_max = 100[mN]  // Maximum force
  t_load = 20[s]  // Loading time
  t_hold = 10[s]  // Hold time
  t_unload = 20[s]  // Unloading time
  t_end = t_load+t_hold+t_unload  // Total time
  n_ramp = 40  // Output steps per ramp
  R_ind = 50[um]  // Tip radius
  E_ind = 1141[GPa]  // Young's modulus, diamond
  nu_ind = 0.07  // Poisson's ratio, diamond
  rho_ind = 3515[kg/m^3]  // Density, diamond
  W_s = 300[um]  // Sample radius
  H_s = 300[um]  // Sample thickness
  E_s = 79[GPa]  // Young's modulus, Au
  nu_s = 0.42  // Poisson's ratio, Au
  rho_s = 19300[kg/m^3]  // Density, Au
  sigy_s = 30[MPa]  // Initial yield stress, Au (annealed)
  Et_s = 0.4[GPa]  // Isotropic tangent modulus, Au
  Ek_s = 0.4[GPa]  // Kinematic tangent modulus, Au
  a_est = sqrt(2*R_ind*h_max)  // Estimated contact radius
  b_fine = 1.5*a_est  // Refinement zone size
  b_vis = 3*a_est  // Close-up zone size (3D plots)
  h_fine = a_est/30  // Element size, refinement zone
  h_src = 2*h_fine  // Element size, indenter surface
  h_glob = H_s/10  // Maximum element size
  cap_h = 0.3*R_ind  // Indenter cap height
  r_cap = sqrt(R_ind^2-(R_ind-cap_h)^2)  // Indenter cap radius
  A_top = pi*r_cap^2  // Indenter top area
  r_m = 0.5*r_cap  // Point on indenter arc, r
  z_m = R_ind-sqrt(R_ind^2-r_m^2)  // Point on indenter arc, z
  tol_g = 1e-3[um]  // Selection tolerance
  k_stiff = 1000*2*E_s*a_est  // Load frame stiffness, displacement control
  k_soft = 0.01*F_max/h_max  // Stabilizing stiffness, force control

Variables
  var1 "Load program"
    prog = if(t<t_load, t/t_load, if(t<t_load+t_hold, 1, max(t_end-t,0[s])/t_unload))  // Normalized load program
    delta_cmd = h_max*prog  // Commanded depth
    F_cmd = F_max*prog  // Commanded force
    f_drive = (1-disp_ctrl)*(-F_cmd/A_top-k_soft/A_top*w)-disp_ctrl*k_stiff/A_top*(w+delta_cmd)  // Load frame traction, z component
  var2 "Outputs"
    F_ind = -intop_ind(f_drive)  // Indentation force
    h_ind = -aveop_ind(w)  // Indenter displacement
    F_bot = -intop_bot(solid.sz)  // Reaction force, sample bottom

Selections
  sel_sample_dom: Box "Sample"
    entitydim = 2
    xmin = -tol_g
    xmax = W_s+tol_g
    ymin = -H_s-tol_g
    ymax = tol_g
    condition = inside
  sel_fine_dom: Box "Refinement zone"
    entitydim = 2
    xmin = -tol_g
    xmax = b_fine+tol_g
    ymin = -b_fine-tol_g
    ymax = tol_g
    condition = inside
  sel_vis_dom: Box "Close-up zone"
    entitydim = 2
    xmin = -tol_g
    xmax = b_vis+tol_g
    ymin = -b_vis-tol_g
    ymax = tol_g
    condition = inside
  sel_ind_dom: Box "Indenter"
    entitydim = 2
    xmin = -tol_g
    xmax = r_cap+tol_g
    ymin = -tol_g
    ymax = cap_h+tol_g
    condition = inside
  sel_top: Box "Sample surface"
    entitydim = 1
    xmin = -tol_g
    xmax = W_s+tol_g
    ymin = -tol_g
    ymax = tol_g
    condition = inside
  sel_bottom: Box "Sample bottom"
    entitydim = 1
    xmin = -tol_g
    xmax = W_s+tol_g
    ymin = -H_s-tol_g
    ymax = -H_s+tol_g
    condition = inside
  sel_ind_top: Box "Indenter top"
    entitydim = 1
    xmin = -tol_g
    xmax = r_cap+tol_g
    ymin = cap_h-tol_g
    ymax = cap_h+tol_g
    condition = inside
  sel_ind_arc: Ball "Indenter surface" | entitydim = 1; posx = r_m; posy = z_m; r = 100*tol_g

Couplings
  intop_ind: Integration "Integration, indenter top" on selection sel_ind_top | axisym = on
  intop_bot: Integration "Integration, sample bottom" on selection sel_bottom | axisym = on
  aveop_ind: Average "Average, indenter top" on selection sel_ind_top | axisym = on

Pairs
  p1: Contact "Contact pair, indenter - sample" | source: selection sel_ind_arc; destination: selection sel_top

Geometry
  geom1 "Geometry 1" (2D axisymmetric, length unit µm)
    r1: Rectangle "Sample" | size = {W_s, H_s}; pos = {0, -H_s}
    r2: Rectangle "Refinement zone" | size = {b_fine, b_fine}; pos = {0, -b_fine}
    r4: Rectangle "Close-up zone" | size = {b_vis, b_vis}; pos = {0, -b_vis}
    uni1: Union "Sample (partitioned)" | input = r1, r2, r4
    c1: Circle | r = R_ind; pos = {0, R_ind}
    r3: Rectangle | size = {R_ind, 2*cap_h}; pos = {0, -cap_h}
    int1: Intersection "Indenter" | input = c1, r3
    fin: Finalize "Form Assembly" | action = assembly; createpairs = off

Materials
  mat1: Common "Au (annealed)" on selection sel_sample_dom
    def: def "Basic"
      density = rho_s
    Enu: Enu "Young's modulus and Poisson's ratio"
      E = E_s
      nu = nu_s
    ElastoplasticModel: ElastoplasticModel "Elastoplastic material model"
      sigmags = sigy_s
      Et = Et_s
      Ek = Ek_s
      Hillcoefficients = {0, 0, 0, 0, 0, 0}
      ys = {0, 0, 0, 0, 0, 0}
  mat2: Common "Diamond" on selection sel_ind_dom
    def: def "Basic"
      density = rho_ind
    Enu: Enu "Young's modulus and Poisson's ratio"
      E = E_ind
      nu = nu_ind

Physics
  solid: SolidMechanics on all domains
    dependent variable u = {u, v, w}
    StructuralTransientBehavior.StructuralTransientBehavior = Quasistatic
    lemm1: LinearElasticModel "Linear Elastic Material, indenter" (default)
    axi1: AxialSymmetrySolid "Axial Symmetry 1" (default)
    free1: Free (default)
    init1: init "Initial Values 1" (default)
    dcnt1: SolidContact "Contact 1" (default) | ContactMethodCtrl = Penalty
    lemm2: LinearElasticModel "Linear Elastic Material, sample" on selection sel_sample_dom
      plsty1: Plasticity on all domains
        IsotropicHardeningModel = LinearIsotropicHardening
        KinematicHardeningModel = NoKinematicHardening
    fix1: Fixed "Fixed Constraint 1" on selection sel_bottom
    bndl1: BoundaryLoad "Load frame" on selection sel_ind_top | forceReferenceArea = {0, 0, f_drive}

Mesh
  mesh1 "Mesh 1"
    size: MeshSizeDefault | hmax = h_glob; hmin = h_fine/2; hgrad = 1.25; custom = on
    map1: Map "Mapped 1" on selection sel_fine_dom
      size1: Size on selection sel_fine_dom | hmax = h_fine; custom = on
    ftri1: FreeTri "Free Triangular 1" on remaining entities
      size1: Size on selection sel_ind_arc | hmax = h_src; custom = on

Studies
  std1 "Load - hold - unload"
    time: Transient "Time Dependent"
      tlist = range(0,t_load/(10*n_ramp),t_load/n_ramp) range(2*t_load/n_ramp,t_load/n_ramp,t_load) range(t_load+t_hold/5,t_hold/5,t_load+t_hold) range(t_load+t_hold+t_unload/n_ramp,t_unload/n_ramp,t_end)

Solver configurations
  sol1 "Solution 1" (study std1)
    v1: Variables "Dependent Variables 1"
    t1: Time "Time-Dependent Solver 1" | tstepsbdf = strict
      dDef: Direct
      fc1: FullyCoupled | dtech = hnlin; maxiter = 50

Datasets
  dset1: Solution | solution = sol1
  dset_vis: Solution "Close-up zone" on selection sel_vis_dom | solution = sol1
  rev_vis: Revolve2D "Revolution, close-up" | data = dset_vis; startangle = -90; revangle = 270
  dset_ind: Solution "Indenter" on selection sel_ind_dom | solution = sol1
  rev_ind: Revolve2D "Revolution, indenter" | data = dset_ind; startangle = -90; revangle = 270
  dset_smp: Solution "Sample" on selection sel_sample_dom | solution = sol1
  rev_smp: Revolve2D "Revolution, sample" | data = dset_smp; startangle = -90; revangle = 270

Plots
  pg1: PlotGroup1D "Force-depth curve" | data = dset1
    glob1: Global | expr = F_ind; unit = mN; xdata = expr; xdataexpr = h_ind
  pg2: PlotGroup1D "Depth vs time" | data = dset1
    glob1: Global | expr = h_ind; unit = um
  pg3: PlotGroup1D "Force vs time" | data = dset1
    glob1: Global | expr = F_ind; unit = mN
  pg4: PlotGroup1D "Surface profile" | data = dset1
    lngr1: LineGraph on selection sel_top | expr = w; unit = um; xdata = expr; xdataexpr = r
  pg5: PlotGroup2D "von Mises stress" | data = dset1
    surf1: Surface | expr = solid.mises; unit = MPa
      def1: Deform "Deformation 1" | expr = {u, w}
    str1: Streamline | expr = {u, w}
  pg6: PlotGroup2D "Equivalent plastic strain" | data = dset1
    surf1: Surface | expr = solid.epe
      def1: Deform "Deformation 1" | expr = {u, w}
  pg7: PlotGroup3D "von Mises stress at maximum load (deformation x5)"
    data = rev_vis
    title = von Mises stress at maximum load (deformation x5)
    surf1: Surface | expr = solid.mises; unit = MPa
      def1: Deform "Deformation 1" | expr = {u, v, w}
    surf2: Surface "Indenter" | data = rev_ind; expr = 1
      def1: Deform "Deformation 1" | expr = {u, v, w}
  pg8: PlotGroup3D "Residual von Mises stress (deformation x5)"
    data = rev_vis
    title = Residual von Mises stress (deformation x5)
    surf1: Surface | expr = solid.mises; unit = MPa
      def1: Deform "Deformation 1" | expr = {u, v, w}
    surf2: Surface "Indenter" | data = rev_ind; expr = 1
      def1: Deform "Deformation 1" | expr = {u, v, w}
  pg9: PlotGroup3D "Equivalent plastic strain (deformation x5)"
    data = rev_vis
    title = Equivalent plastic strain (deformation x5)
    surf1: Surface | expr = solid.epe
      def1: Deform "Deformation 1" | expr = {u, v, w}
    surf2: Surface "Indenter" | data = rev_ind; expr = 1
      def1: Deform "Deformation 1" | expr = {u, v, w}
  pg10: PlotGroup3D "Sample at maximum load (deformation x5)"
    data = rev_smp
    title = Sample at maximum load (deformation x5)
    surf1: Surface | expr = solid.mises; unit = MPa
      def1: Deform "Deformation 1" | expr = {u, v, w}
    surf2: Surface "Indenter" | data = rev_ind; expr = 1
      def1: Deform "Deformation 1" | expr = {u, v, w}
  pg11: PlotGroup3D "Spherical microindentation of Au (deformation x5)"
    data = rev_vis
    title = Spherical microindentation of Au (deformation x5)
    surf1: Surface | expr = solid.mises; unit = MPa
      def1: Deform "Deformation 1" | expr = {u, v, w}
    surf2: Surface "Indenter" | data = rev_ind; expr = 1
      def1: Deform "Deformation 1" | expr = {u, v, w}
    con1: Contour | expr = solid.WsGp
      def1: Deform "Deformation 1" | expr = {u, v, w}

Exports
  anim1: Animation | target = player